OpenVSP model (file version 4), 1 components.
Geometry view with OpenVSP parameter names; values to 6 digits, angles in degrees, lengths in the model's unit.
Overall bounding box: X_Min=0 X_Len=30 Y_Min=-1.35208 Y_Len=2.70416 Z_Min=-1.5 Z_Len=3

Fuselage "fuselage"
  location (X Y Z) 0 0 0, rotation 0 0 0
  bounding box size 30 2.70416 3
  Design: Length=38.02
  cross sections:
    n  XLocPercent  YLocPercent  ZLocPercent  shape
    0  0            0            0            point
    1  0.157391     0            0            ellipse Ellipse_Height=3.74 Ellipse_Width=3.74
    2  0.75         0            0            as above
    3  1            0            0            ellipse Ellipse_Height=3.65 Ellipse_Width=3.74
    4  1            0            0.02         point
